New "Spectrum.default" NumHarm=7 harmonic=(1, 3, 5, 7, 9, 11, 13, ) %mag=(100, 33, 20, 14, 11, 9, 7, ) angle=(0, 0, 0, 0, 0, 0, 0, )
New "Spectrum.defaultload" NumHarm=7 harmonic=(1, 3, 5, 7, 9, 11, 13, ) %mag=(100, 1.5, 20, 14, 1, 9, 7, ) angle=(0, 180, 180, 180, 180, 180, 180, )
New "Spectrum.defaultgen" NumHarm=7 harmonic=(1, 3, 5, 7, 9, 11, 13, ) %mag=(100, 5, 3, 1.5, 1, 0.7, 0.5, ) angle=(0, 0, 0, 0, 0, 0, 0, )
New "Spectrum.defaultvsource" NumHarm=1 harmonic=(1, ) %mag=(100, ) angle=(0, )
New "Spectrum.linear" NumHarm=1 harmonic=(1, ) %mag=(100, ) angle=(0, )
New "Spectrum.pwm6" NumHarm=13 harmonic=(1, 3, 5, 7, 9, 11, 13, 15, 17, 19, 21, 23, 25, ) %mag=(100, 4.4, 76.5, 62.7, 2.9, 24.8, 12.7, 0.5, 7.1, 8.4, 0.9, 4.4, 3.3, ) angle=(-103, -5, 28, -180, -33, -59, 79, 36, -253, -124, 3, -30, 86, )
New "Spectrum.dc6" NumHarm=10 harmonic=(1, 3, 5, 7, 9, 11, 13, 15, 17, 19, ) %mag=(100, 1.2, 33.6, 1.6, 0.4, 8.7, 1.2, 0.3, 4.5, 1.3, ) angle=(-75, 28, 156, 29, -91, 49, 54, 148, -57, -46, )
New "Spectrum.spectrum_1" NumHarm=8 CSVFile=Spectrum_Load_1.csv
New "Spectrum.spectrum_2" NumHarm=8 CSVFile=Spectrum_Load_2.csv
New "Spectrum.spectrum_3" NumHarm=8 CSVFile=Spectrum_Load_3.csv
